taxfree := 400
income_tax := 0.2
health_insurance := 0.0698
social_insurance := 0.1252
pension := 0
netto_salary(brutto) := brutto - income_tax*(brutto - taxfree) - (health_insurance + social_insurance + pension)*brutto
salary := 607
netto_salary(salary) = 447.235
